U := 3.5
RK1 := 29.4
LK := 0.230
C := 10^-6*6.47
I(f) := U/sqrt(RK1^2 + (2*π*f*LK - 1/(2*π*f*C))^2)
f0 := 1/(2*π*sqrt(LK*C))
f0 = 130.468
f := 100, 100.01 .. 160
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UC(f) := I(f)*1/(2*π*f*C)
UL(f) := I(f)*2*π*f*LK
f := 100, 100.01 .. 150
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w0 := 2*π*f0 = 819.755
p := sqrt(LK/C) = 188.544
Q := p/RK1 = 6.41305
C := 7.47*10^-6
U := 10
RD1 := 5600
RD2 := 9000
L2 := 0.403
RK2 := 41.4
p := sqrt(L2/C) = 232.27
Q := p/RK2 = 5.61037
f0 := 1/(2*π*sqrt(L2*C)) = 91.7291
R0 := p^2/RK2 = 1303.12
QP1 := Q/(1 + R0/RD1) = 4.55129
QP2 := Q/(1 + R0/RD2) = 4.90079
Uk01 := U*R0/(R0 + RD1) = 1.88773
Uk02 := U*R0/(R0 + RD2) = 1.26478
Uk1(f) := Uk01/sqrt(1 + (QP1*(f/f0 - f0/f))^2)
Uk2(f) := Uk02/sqrt(1 + (QP2*(f/f0 - f0/f))^2)
phi2(f) := -atan(QP2*(f/f0 - f0/f))
phi1(f) := -atan(QP1*(f/f0 - f0/f))
f := 60, 60.01 .. 120
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