U := 3.5
RK1 := 29.4
LK := 0.230
C := 10^-6*6.47
I(f) := U/sqrt(RK1^2 + (2*π*f*LK - 1/(2*π*f*C))^2)
f0 := 1/(2*π*sqrt(LK*C))
f0 = 130.468
f := 100, 100.01 .. 160
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UC(f) := I(f)*1/(2*π*f*C)
UL(f) := I(f)*2*π*f*LK
f := 100, 100.01 .. 150
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I(20)*1000 = 2.91326
UC(20) = 3.58315
UL(20) = 0.084201
I(121)*1000 = 85.571
w0 := 2*π*f0 = 819.755
UC(121) = 17.3963
UL(121) = 14.963
I(124)*1000 = 99.7032
UC(124) = 19.779
UL(124) = 17.8665
I(127)*1000 = 112.518
UC(127) = 21.7938
UL(127) = 20.6506
p := sqrt(LK/C) = 188.544
I(f0)*1000 = 119.048
UC(f0) = 22.4457
UL(f0) = 22.4457
I(133)*1000 = 115.586
UC(133) = 21.3782
UL(133) = 22.216
Q := p/RK1 = 6.41305
I(136)*1000 = 105.066
I(139)*1000 = 92.3709
UC(136) = 19.0038
UL(136) = 20.6495
UC(139) = 16.3469
UL(139) = 18.5549
I(240)*1000 = 14.2219
UC(240) = 1.45768
UL(240) = 4.93262
C := 7.47*10^-6
U := 10
RD1 := 5600
RD2 := 9000
L2 := 0.403
RK2 := 41.4
p := sqrt(L2/C) = 232.27
Q := p/RK2 = 5.61037
f0 := 1/(2*π*sqrt(L2*C)) = 91.7291
R0 := p^2/RK2 = 1303.12
QP1 := Q/(1 + R0/RD1) = 4.55129
QP2 := Q/(1 + R0/RD2) = 4.90079
Uk01 := U*R0/(R0 + RD1) = 1.88773
Uk02 := U*R0/(R0 + RD2) = 1.26478
Uk1(f) := Uk01/sqrt(1 + (QP1*(f/f0 - f0/f))^2)
Uk2(f) := Uk02/sqrt(1 + (QP2*(f/f0 - f0/f))^2)
phi2(f) := -atan(QP2*(f/f0 - f0/f))
phi1(f) := -atan(QP1*(f/f0 - f0/f))
f := 60, 60.01 .. 120
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Uk2(10) = 0.0284659
phi2(10)/deg = 88.7104
phi1(10)/deg = 88.6114
Uk1(10) = 0.0457469
Uk2(83) = 0.902517
Uk1(83) = 1.39494
Uk2(86) = 1.06888
phi2(83)/deg = 44.4734
phi1(83)/deg = 42.3577
Uk1(86) = 1.62765
Uk2(f0) = 1.26478
Uk1(f0) = 1.88773
phi2(86)/deg = 32.3162
phi1(86)/deg = 30.4324
Uk2(95) = 1.19618
Uk1(95) = 1.79844
Uk2(98) = 1.06111
Uk1(98) = 1.61702
phi2(89)/deg = 16.4934
phi1(89)/deg = 15.3748
Uk2(101) = 0.919185
Uk1(101) = 1.41872
Uk2(180) = 0.175927
phi2(f0)/deg = 0
Uk1(180) = 0.282305
phi1(f0)/deg = 0
phi2(95)/deg = -18.9569
phi1(95)/deg = -17.6922
phi2(98)/deg = -32.9684
phi1(98)/deg = -31.0634
phi2(101)/deg = -43.385
phi1(101)/deg = -41.2752
phi2(180)/deg = -82.0044
phi1(180)/deg = -81.3993
